// COMSOL Multiphysics 5.1.0.234 model "Axisymmetric_Shnankenberg.mph"
// Outline of the model tree

Parameters
  L = 3.7
  alpha = 0.1
  beta = 0.9

Functions
  rn1: Random | funcname = rand1; nargs = 2

Geometry
  geom1 "Geometry 1" (1D axisymmetric, length unit m)
    i1: Interval | p = 0, 1
    fin: Finalize "Form Union"

Physics
  c: CoefficientFormPDE on all domains
    dependent variable u = {u, v}
    cfeq1: CoefficientFormPDE (default)
      c = {1/L^2, 0, 0, 50/L^2}
      f = {alpha-u+u^2*v, beta-u^2*v}
      da = {1, 0, 0, 1}
      al = {0, 0, 0, 0}
      be = {-1/L^2*1/r, 0, 0, -50/L^2*1/r}
    zflx1: ZeroFluxBoundary "Zero Flux 1" (default)
    init1: init "Initial Values 1" (default) | u = abs(alpha+beta+rand1(r,1)); v = abs(beta/(alpha+beta)^2+rand1(r,2))

Mesh
  mesh1 "Mesh 1"
    size: MeshSizeDefault | hmax = 0.01; hauto = 1
    edg1: Edge on remaining entities

Studies
  std1 "Study 1"
    param: Parametric "Parametric Sweep" | pname = L; plistarr = range(4.3,0.01,4.5)
    time: Transient "Time Dependent" | tlist = range(0,200,200)

Solver configurations
  sol1 "Solution 1" (study std1)
    v1: Variables "Dependent Variables 1"
    t1: Time "Time-Dependent Solver 1" | tlist = range(0,200,200)
      dDef: Direct
      fc1: FullyCoupled | linsolver = dDef
  sol2 "Parametric Solutions 1" (study std1)

Datasets
  dset1: Solution | solution = sol1
  rev1: Revolve1D "Revolution 1D 1" | data = dset1; startangle = -90; revangle = 225
  dset2: Solution | solution = sol2
  rev2: Revolve1D "Revolution 1D 2" | data = dset2; startangle = -90; revangle = 225
  cpt1: CutPoint1D | data = dset2; pointx = 1; bndsnap = on
  par1: Parametric1D "Parametric Extrusion 1D 1" | data = cpt1
  par2: Parametric2D "Parametric Extrusion 2D 2" | data = rev1

Plots
  pg1: PlotGroup1D "1D Plot Group 1" | data = dset1
    lngr1: LineGraph on all domains | expr = u; xdata = expr; xdataexpr = r
  pg2: PlotGroup2D "2D Plot Group 2" | data = rev1
    surf1: Surface | expr = u-1
      hght1: Height "Height Expression 1" | expr = u; offset = 0
  pg3: PlotGroup1D "1D Plot Group 3" | data = dset2
    lngr1: LineGraph on all domains | expr = u; xdata = expr; xdataexpr = r
  pg4: PlotGroup2D "2D Plot Group 4" | data = rev2
    surf1: Surface | expr = u
  pg5: PlotGroup1D "1D Plot Group 5" | data = cpt1
    ptgr1: PointGraph | expr = u; xdata = expr; xdataexpr = L