// COMSOL Multiphysics 5.1.0.234 model "Circle_vs_square_growing.mph"
// Outline of the model tree

Parameters
  L = 2.5
  alpha = 0.1
  beta = 0.9

Functions
  rn1: Random | funcname = rand1; nargs = 3; uniformrange = 0.05

Geometry
  geom1 "Geometry 1" (2D, length unit m)
    c1: Circle | r = L/2
    sq1: Square | pos = {L+1.5, -1/2}; size = L
    c2: Circle (disabled) | pos = {0, 1.1}; r = 1/2
    fin: Finalize "Form Union"

Physics
  c: CoefficientFormPDE on all domains
    dependent variable u = {u, v}
    cfeq1: CoefficientFormPDE (default)
      c = {{1, 0, 0, 1}, {0, 0, 0, 0}, {0, 0, 0, 0}, {50, 0, 0, 50}}
      f = {alpha-u+u^2*v, beta-u^2*v}
      da = {1, 0, 0, 1}
    zflx1: ZeroFluxBoundary "Zero Flux 1" (default)
    init1: init "Initial Values 1" (default) | u = abs(alpha+beta+rand1(x,y,1)); v = abs(beta/(alpha+beta)^2+rand1(x,y,2))
    init2: init "Initial Values 2" (disabled) on domains 2
      u = abs(alpha+beta-exp((-x^2-y^2)*10)+0.5+0*rand1(x,y,1))
      v = abs(beta/(alpha+beta)^2+exp((-x^2-y^2)*10)-0.5+0*rand1(x,y,2))

Mesh
  mesh1 "Mesh 1"
    size: MeshSizeDefault | hauto = 3
    map1: Map "Mapped 1" on remaining entities

Studies
  std1 "Study 1"
    param: Parametric "Parametric Sweep" | pname = L; plistarr = range(2,0.1,4.5)
    time: Transient "Time Dependent" | tlist = range(0,2000,2000)

Solver configurations
  sol1 "Solution 1" (study std1)
    v1: Variables "Dependent Variables 1"
    t1: Time "Time-Dependent Solver 1" | tlist = range(0,2000,2000)
      dDef: Direct
      fc1: FullyCoupled | linsolver = dDef
  sol2 "Parametric Solutions 1" (study std1)

Datasets
  dset1: Solution | solution = sol1
  dset2: Solution | solution = sol2

Plots
  pg1: PlotGroup2D "2D Plot Group 1" | data = dset2
    surf1: Surface | expr = u
  pg2: PlotGroup2D "2D Plot Group 2" | data = dset1
    surf1: Surface | expr = u