// COMSOL Multiphysics 5.1.0.234 model "OneD_Schnak_check_bif_point.mph"
// Outline of the model tree

Functions
  rn1: Random | nargs = 3

Geometry
  geom1 "Geometry 1" (1D, length unit m)
    i1: Interval | p1 = -0.1; p2 = -4.4-0.1; p = {-0.1, -4.4-0.1}
    i2: Interval | p1 = 0.1; p2 = 0.1+4.5; p = {0.1, 0.1+4.5}
    i3: Interval (disabled) | p2 = 3.7; p = {0, 3.7}
    fin: Finalize "Form Union"

Physics
  c: CoefficientFormPDE on all domains
    dependent variable u = {u, v}
    cfeq1: CoefficientFormPDE (default) | c = {1, 0, 0, 10}; f = {0.1-u+u^2*v, 0.9-u^2*v}; da = {1, 0, 0, 1}
    zflx1: ZeroFluxBoundary "Zero Flux 1" (default)
    init1: init "Initial Values 1" (default) | u = 1+rn1(x,1,1); v = 9/10+rn1(x,1,2)
    dir1: DirichletBoundary "Dirichlet Boundary Condition 1" on all boundaries | r = {1, 0.9}

Mesh
  mesh1 "Mesh 1" (physics-controlled)
    size: MeshSizeDefault | hauto = 1

Studies
  std1 "Study 1"
    time: Transient "Time Dependent" | tlist = range(0,100,1000)

Solver configurations
  sol1 "Solution 1" (study std1)
    v1: Variables "Dependent Variables 1"
    t1: Time "Time-Dependent Solver 1" | tlist = range(0,100,1000)
      dDef: Direct
      fc1: FullyCoupled | linsolver = dDef

Datasets
  dset1: Solution | solution = sol1

Plots
  pg1: PlotGroup1D "1D Plot Group 1" | data = dset1
    lngr1: LineGraph on all domains | expr = u; xdata = expr; xdataexpr = x