// COMSOL Multiphysics 5.1.0.234 model "Schnakenberg.mph"
// Outline of the model tree

Parameters
  alpha = 1
  beta = 3
  theta1 = 1.8
  theta2 = 2.2
  r1 = 1
  r2 = 1
  J = 1/L^2
  L = 0.578

Functions
  rn1: Random | nargs = 3; uniformrange = 0.1

Geometry
  geom1 "Geometry 1" (2D, length unit m)
    sq1: Square | size = 1
    c1: Circle (disabled) | pos = {0, -2}; r = 1
    fin: Finalize "Form Union"

Physics
  c: CoefficientFormPDE on all domains
    dependent variable u = {u, v}
    cfeq1: CoefficientFormPDE (default)
      c = 
        {J*r1^2/4*v, 0, 0, J*r1^2/4*v}
        {J*r2*v*(r2/4+cos(theta2)/3), J*r2*v*sin(theta1)/3, -J*r2*v*sin(theta1)/3, J*r2*v*(r2/4+cos(theta2)/3)}
        {J*r1*u*(r1/4-cos(theta1)/3), -J*r1*u*sin(theta1)/3, J*r1*u*sin(theta1)/3, J*r1*u*(r1/4-cos(theta1)/3)}
        {J*r2^2/4*u, 0, 0, J*r2^2/4*u}
      f = {alpha-u+u^2*v+(alpha+beta-u)^3, beta-u^2*v+(beta/(alpha+beta)^2-v)^3}
      da = {1, 0, 0, 1}
    zflx1: ZeroFluxBoundary "Zero Flux 1" (default)
    init1: init "Initial Values 1" (default)
      u = alpha+beta+0*rn1(x,y,1)+cos(pi*x)*0.1
      v = beta/(alpha+beta)^2+0*rn1(x,y,2)+cos(pi*x)*0.1
    pc1: PeriodicCondition (disabled) on boundaries 2, 3
    pc2: PeriodicCondition (disabled) on boundaries 1, 4
    dir1: DirichletBoundary "Dirichlet Boundary Condition 1" (disabled) on all boundaries
      r = {alpha+beta, beta/(alpha+beta)^2}

Mesh
  mesh1 "Mesh 1" (physics-controlled)
    size: MeshSizeDefault | hauto = 2

Studies
  std1 "Study 1"
    time: Transient "Time Dependent" | tlist = range(0,0.01,100)

Solver configurations
  sol1 "Solution 1" (study std1)
    v1: Variables "Dependent Variables 1"
    t1: Time "Time-Dependent Solver 1" | tlist = range(0,0.01,100)
      dDef: Direct
      fc1: FullyCoupled | linsolver = dDef

Datasets
  dset1: Solution | solution = sol1

Plots
  pg1: PlotGroup2D "2D Plot Group 1" | data = dset1; animating = off
    surf1: Surface | expr = u

Exports
  anim1: Animation
    target = player
    framesel = all
    maxframes = 111
    onlydisplay = off
    frametime = 0.01
    options = off
    axes = on