// COMSOL Multiphysics 5.1.0.234 model "Square_vs_triangle.mph"
// Outline of the model tree

Parameters
  L = 10.3

Functions
  rn1: Random | nargs = 3

Geometry
  geom1 "Geometry 1" (2D, length unit m)
    sq1: Square | pos = {0.1, 0}; size = L
    pol1: Polygon | x = {0, -L, -L/2, 0}; y = {0, 0, sqrt(3)*L/2, 0}
    fin: Finalize "Form Union"

Physics
  c: CoefficientFormPDE on all domains
    dependent variable u = {u, v}
    cfeq1: CoefficientFormPDE (default)
      c = {{1, 0, 0, 1}, {0, 0, 0, 0}, {0, 0, 0, 0}, {10, 0, 0, 10}}
      f = {0.1-u+u^2*v, 0.9-u^2*v}
      da = {1, 0, 0, 1}
    zflx1: ZeroFluxBoundary "Zero Flux 1" (default)
    init1: init "Initial Values 1" (default) | u = rn1(x,y,1)+1; v = rn1(x,y,2)+0.9

Mesh
  mesh1 "Mesh 1" (physics-controlled)
    size: MeshSizeDefault | hauto = 3

Studies
  std1 "Study 1"
    time: Transient "Time Dependent" | tlist = range(0,1000,10000)

Solver configurations
  sol1 "Solution 1" (study std1)
    v1: Variables "Dependent Variables 1"
    t1: Time "Time-Dependent Solver 1" | tlist = range(0,1000,10000)
      dDef: Direct
      fc1: FullyCoupled | linsolver = dDef

Datasets
  dset1: Solution | solution = sol1

Plots
  pg1: PlotGroup2D "2D Plot Group 1" | data = dset1
    surf1: Surface | expr = u
      hght1: Height "Height Expression 1" | expr = u